OpenVSP model (file version 5), 1 components.
Geometry view with OpenVSP parameter names; values to 6 digits, angles in degrees, lengths in the model's unit.
Overall bounding box: X_Min=-7.66729e-05 X_Len=8.00008 Y_Min=0 Y_Len=200 Z_Min=-0.240693 Z_Len=0.974126

Wing "Clark_Y_airfoil"
  location (X Y Z) 0 0 0, rotation 0 0 0
  bounding box size 8.00008 200 0.974126
  totals: TotalSpan=200 TotalProjectedSpan=200 TotalChord=8 TotalArea=1600 TotalAR=25
  root: chord 8, twist 0, airfoil file "CLARK Y AIRFOILS"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 BaseThickChord=0.11742 ThickChord=0.11742
  sections:
    n  Span  Root_Chord  Tip_Chord  Area  Sweep  Sweep_Location  Dihedral  Twist  Twist_Location  tip airfoil
    1  200   8           8          1600  0      0               0         0      0.25            as above
