OpenVSP model (file version 5), 2 components.
Geometry view with OpenVSP parameter names; values to 6 digits, angles in degrees, lengths in the model's unit.
Overall bounding box: X_Min=-7.66729e-05 X_Len=8.00008 Y_Min=0 Y_Len=700 Z_Min=-0.240693 Z_Len=0.974126

Wing "Clark_Y_airfoil"
  location (X Y Z) 0 0 0, rotation 0 0 0
  bounding box size 8.00008 700 0.974126
  totals: TotalSpan=700 TotalProjectedSpan=700 TotalChord=8 TotalArea=5600 TotalAR=87.5
  root: chord 8, twist 0, airfoil file "CLARK Y AIRFOILS"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 BaseThickChord=0.11742 ThickChord=0.11742
  sections:
    n  Span  Root_Chord  Tip_Chord  Area  Sweep  Sweep_Location  Dihedral  Twist  Twist_Location  tip airfoil
    1  700   8           8          5600  0      0               0         0      0.25            as above

Mesh "MeshGeom"
  location (X Y Z) 0 0 0, rotation 0 0 0
  triangle mesh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

VSPAERO settings: Sref=5600 bref=700 cref=8 Xcg=3.3444 Ycg=350 Zcg=0.213492 AlphaStart=-10 AlphaEnd=20 AlphaNpts=29 BetaStart=0 BetaEnd=0 BetaNpts=1 MachStart=0.0358 MachEnd=0 MachNpts=1 ReCref=2.0352e+06 Vinf=100 Rho=0.002377
